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# Datos geométricos y esfuerzos : | Datos de concentradores:
d_A := 500 mm
# Confiabilidad = 99.9 %
#
# Maquinado
#
# T_m_edia = 50 °C
#
# Ancho de cara = 30 mm
d_B := 250 mm
S_ut := 620 MPa
S_y := 480 MPa
n_fs := 1.8
F_Ax := 572 N
F_Bx := 1144 N
F_Ay := 208 N
F_By := 416 N
L_A := 200 mm
L_B := 200 mm
L_C := 200 mm
# Definimos el factor teórico de fatiga, para el acero aleado <1400 MPa:
S_e' := 0.5*S_ut = 310 MPa
# Y los factores de concentración:
K_a := 4.51*620^-0.265 = 0.820716
K_b := 1  # para determinación inicial
K_d := 1.010
K_c := 1
K_e := 0.753
S_e := K_a*K_b*K_c*K_d*K_e*S_e' = 193.495 MPa
# Ahora los esfuerzos máximos permisibles:
σ_permisible := S_y/n_fs = 266.667 MPa
τ_permisible := 0.577*S_y = 276.96 MPa
# DCL C_1 a C_2
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# No se especifica la condición de las cargas (alternante), por lo cual se supone que existen esfuerzos máximos y un diseño estático para el eje.
C_1x := 0
C_2x := (F_Ax - F_Bx)
# Del DCL planteado se obtiene lo siguiente:
C_1y := 0
C_2y := (F_Ay + F_By)
sum(F_x)
-C_1x + F_Ax - F_Bx - C_2x = 0 N  # (1)
sum(F_y)
C_1y - F_Ay - F_By + C_2y = 0 N  # (2)
sum(MF_C1) - ZY
F_Ax*L_A - F_Bx*(L_A + L_B) - C_2x*(L_A + L_B + L_C) = 0 N*m  # (3)
C_2y := (F_Ay*L_A + F_By*(L_A + L_B))/(L_A + L_B + L_C) = 346.667 N
sum(MF_C1) - ZX
-F_Ay*L_A - F_By*(L_A + L_B) + C_2y*(L_A + L_B + L_C) = 0 N*m  # (4)
T_A := 1 N*m
T_B := 1 N*m
sum(T_C1)
T_A - T_B = 0 N*m  # (5)
T_A := F_Ax*d_A/2 = 143 N*m
T_B := F_Bx*d_B/2 = 143 N*m
# de (3)
C_2x := (F_Ax*L_A - F_Bx*(L_A + L_B))/(L_A + L_B + L_C) = -572 N
C_2x = -572 N
C_1y := F_Ay + F_By - C_2y = 277.333 N
# de (4)
C_2y := (F_Ay*L_A + F_By*(L_A + L_B))/(L_A + L_B + L_C) = 346.667 N
C_2y = 346.667 N
C_1x := F_Ax - F_Bx - C_2x = 0 N
# de (2)
C_1y = 277.333 N
# de (1)
C_1x = 0 N
# Determinada la estática del problema, debemos calcular los momentos internos de la figura.
# Eje ZY
# El momento flector desde C_1 hasta A
MF_Azy := C_1y*L_A = 55.4667 N*m
# El momento flector C_1 hasta B
MF_Bzy := C_1y*(L_A + L_B) - F_Ay*L_B = 69.3333 N*m
# Comprobación de los valores obtenidos
# Eje ZX
# El momento flector desde C_1 hasta A
MF_Azx := C_1x*L_A = 0 N*m
# El momento flector C_1 hasta B
MF_Bzx := C_1x*(L_A + L_B) + F_Ax*L_B = 114.4 N*m
lo
MF_A := sqrt(MF_Azy^2 + MF_Azx^2) = 55.4667 N*m
# Flectores resultantes:
MF_B := sqrt(MF_Bzy^2 + MF_Bzx^2) = 133.77 N*m
# Torque resultante:
T_A = 143 N*m
T_B = 143 N*m
# Como se observa los torques son iguales en magnitud y sentido en el engrane A y B, por lo cual la solicitación máxima queda definida por el momento flector mayor, el cual se genera en el engrane B respecto al equivalente en los ejes x e y.
# Por lo tanto procedemos a determinar los parámetros geométricos del engrane B:
# No existen concentradores de esfuerzos en la primera iteración por lo que K_F y K_f_s seran iguales a 1.
M_A := 1
M_M := 1
T_M := 1
K_f := 1
K_fs := 1
T_A := 1
d := (16*n_fs/π*(1/S_e*(4*(K_f*M_A)^2 + 3*(K_fs*T_A)^2)^(1/2) + 1/S_ut*((4*(K_f*M_M)^2 + 3*K_fs*T_M)^2)^(1/2)))^(1/3)
# No se especifica la condición de las cargas (alternante), por lo cual se supone que existen esfuerzos máximos y un diseño estático para el eje.
# Respecto a la energía de distorsión de Von Mises:
M_max := MF_B = 133.77 N*m
T_max := 143 N*m
d := 1
σ_max := ((32*K_f*MF_B/(π*d^3))^2 + 3*(16*K_fs*T_B/(π*d^3))^2)^(1/2)  # (6)
# Debemos garantizar que se cumpla la condición de seguridad por lo cual:
σ_max ≤ S_y/n  # (7)
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# Para determinar los concentradores utilizamos el grafico de concentradores entregado
# La recomendación respecto a la ANSI, será de r/d=0.021, y los valores de concentración kt y kts serán:
K_t := 2.2
K_ts := 3
# como no conocemos el valor de la sensibilidad a la fatiga suponemos q=1 y de las formulas:
K_f == 1 + q(K_t - 1)
K_fs == 1 + q(K_ts - 1)
# Y finalmente los valores de Kf y Kfs
K_f := 2.2
K_fs := 3
# Despejamos el diámetro desde (6) y (7), para la condición mínima de igualdad.
n_fs = 1.8
S_y = 480 MPa
M_A := 0 J
T_A := 0 J
d := (16*n_fs/(π*S_ut)*sqrt(4*(K_f*M_max)^2 + 3*(K_fs*T_max)^2))^(1/3) = 24.1106 mm
(K_f*M_max)^2 = 86609.2 J^2
(K_fs*T_max)^2 = 184041 J^2
M_M := M_max = 133.77 J
T_M := T_max = 143 J
# Para la deflexión torsional
θ_max := 0.056°
θ_max = 0.000977384 rad
G := 80 GPa
J := π*d^4/32 = 33176.6 mm^4
d := (16*n_fs/π*(1/S_e*(4*(K_f*M_A)^2 + 3*(K_fs*T_A)^2)^(1/2) + 1/S_ut*(4*(K_f*M_M)^2 + 3*(K_fs*T_M)^2)^(1/2)))^(1/3) = 24.1106 mm
θ := T_B*(L_A + L_B + L_C)/(G*J) = 0.032327 rad
θ > θ_max  # diferencia de un 3300%
d := 1
T_B := 1
MF_B := 1
0.032/0.00098*100 = 3265.31
# El cual no cumple el criterio torsional, descartando la primera solución y mostrando que el diámetro necesario debe ser mayor, para que cumpla el criterio torsional.
# Para facilitar la determinación del diámetro optimo, se debe cumplir también con el criterio de rigidez,  suponiendo un criterio de diseño simplificado y considerando las tablas de superposición, existe el caso de la viga con carga en el extremo en voladizo que define la deflexión en un largo l, si consideramos el problema analíticamente el sector que se debe estudiar es el de mayor deflexión, el cual viene a ser la sección del eje entre los engranes A y B, además del diseño de ejes conocemos lo siguiente:
y_eje ≤ 0.830*mm
I := π*d^4/64
# De la elástica
d^2/dx^2(y) == M_max/(E*I)
E := 210 GPa
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# Entonces la deflexión máxima va a ser comparable con:
y_max == F_B*L_B/(3*E*I)
# de la cual
y_max == y_eje
# Se define el bloque de resolución que facilita los pasos de calculo e identificamos los valores de prueba y constantes.
solve block
    # guess values
    T_B := 143 N*m
    G := 80 GPa
    d := 1 mm
    # constraints
    θ_max == T_B*(L_A + L_B + L_C)/(G*π*d^4/32)
    # solver
    find(d) = 57.8207 mm
    θ_max = 0.000977384 rad
end solve block
solve block
    # guess values
    F_Beq := sqrt(F_Bx^2 + F_By^2) = 1217.29 N
    y_max := 0.830 mm
    d := 1 mm
    # constraints
    y_max == F_Beq*L_B^3/(3*E*π*d^4/64)
    # solver
    find(d) = 24.8184 mm
end solve block
# De lo anterior, el diámetro critico está definido por el criterio torsional, el diámetro comercial mas cercano esta dado por:
d_1 := 60 mm
# El esfuerzo máximo está definido por Von mises, tal que de (6):
K_f := 2.2
M_max = 133.77 J
d_1 = 60 mm
σ_max := ((32*K_f*M_max/(π*d_1^3))^2 + 3*(16*K_fs*T_max/(π*d_1^3))^2)^(1/2)
K_fs := 3
T_max = 143 J
# Ajustando el valor de de Kf y Kfs, respecto al diámetro
r := d_1*0.021 = 1.26 mm
# Con esto y las tablas de sensibilidad a la muesca obtenemos:
q := 0.72
K_f := 1 + q*(K_t - 1) = 1.864
q_s := 0.83
K_fs := 1 + q*(K_ts - 1) = 2.44
# Comprobando el valor del factor de seguridad nos queda:
σ_max = 22.3506 MPa
n := σ_permisible/σ_max = 11.9311
n > n_fs
# Se observa que el valor de n para el problema esta altamente sobredimensionado, pero el criterio torsional determina el valor máximo del diámetro para el diseño, por lo cual debemos mantener este valor.
# De manera general cumple los criterios y no fallará a cargas estáticas.
# Para determinar el rango de velocidad critica de giro, el material del eje es acero y también de los engranes, para simplificar los cálculos.
d := 60 mm
# Densidad típica del acero de alto carbono:
ρ_ac := 7850 kg/m^3
d^2 = 0.0036 m^2
# Masa del eje
V_eje := (π*d^2/4*(L_A + L_B + L_C)) = 0.00169646 m^3
m_eje := V_eje*ρ_ac = 13.3172 kg
# Utilizando el método de deflexión estática junto con tablas de superposición:
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# Para el eje con su carga de peso
d = 60 mm
L_total := 0.6 m
d = 0.06 m
g = 9.80665 m/s^2
I := π*d^4/64 = 6.36173e-7 m^4
w := m_eje*g/L_total = 217.662 N/m
y_max_eje == 5*w*L_total^4/(384*E*I)
y_eje := -5*w*L_total^4/(384*E*I)
# Reemplazando:
y_eje = -2.74936 μm
# Para la deflexión de los engranes, necesitamos el peso de cada uno y la misma formula de la tabla 7-9, modificada desde el apoyo derecho tal que:
V_eng_A := π*d_A^2/4*30 mm = 0.00589049 m^3
b == L_total - a
V_eng_B := π*d_B^2/4*30 mm = 0.00147262 m^3
w_eng_A := V_eng_A*ρ_ac*g = 453.463 N
w_eng_B := V_eng_B*ρ_ac*g = 113.366 N
# Además necesitamos la deflexión del eje respecto a los engranes, de donde utilizamos:
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b := 0.4 m
a := 0.4 m
L_total := 0.6 m
y_C1_A(x) := w_eng_A*b*x/(6*E*I*L_total)*(x^2 + b^2 - L_total^2)
y_C1_A(L_A) = -12.0685 μm
y_C1_B(x) := w_eng_B*a*(L_total - x)/(6*E*I*L_total)*(x^2 + a^2 - 2*x*L_total)
y_C1_B(L_A + L_B) = -3.01714 μm
y_C1_A := y_C1_A(L_A)
y_C1_B := y_C1_B(L_A + L_B)
# Al ser materiales dúctiles y homogéneos se considera la suma de las contribuciones por separado como la deflexión total del problema.
y_A := y_eje + y_C1_A = -14.8179 μm
y_B := y_eje + y_C1_B = -5.7665 μm
# La deflexión máxima se produce en el engrane A, por lo cual consideramos este para el calculo de la velocidad critica.
w_A := sqrt(g/|y_A|) = 813.518 rad/s
w_critico := w_A = 7768.52 rpm
# Considerando un rango critico con variación de un 20%
w_min := w_A*0.8 = 6214.82 rpm
w_max := w_A*1.2 = 9322.22 rpm
w_min ≤ w_critico ≤ w_max == 6215*rpm ≤ 7768.521*rpm ≤ 9322.225*rpm
# Para determinar las dimensiones de las chavetas basta con revisar las tablas que se entregan del Shigley donde:
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# Ahora solo debemos comprobar que cumplan los esfuerzos permisibles y el largo de la chaveta.
T_A := 143 N*m
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F_max := T_A/(58 mm/2) = 4931.03 N
H := 11 mm
W := 18 mm
σ_permisible = 266.667 MPa
τ_permisible = 276.96 MPa
L_chaveta_aplastamiento := F_max/(H/2*σ_permisible) = 3.36207 mm
L_chaveta_corte := F_max/(W*τ_permisible) = 0.989119 mm
# Del cual tenemos que el largo mas critico está definido por el aplastamiento, el cual cumple al esfuerzo permisible con el n entregado y esté será el elemento mas critico de todo el diseño.
σ_c := F_max/(H/2*L_chaveta_aplastamiento) = 266.667 MPa
S_y/σ_c = 1.8
# Si consideramos una "dimensión estándar"
L_chaveta_aplastamiento := 3.5 mm
σ_c := F_max/(H/2*L_chaveta_aplastamiento) = 256.158 MPa
S_y/σ_c = 1.87385
# Tarea N°1 DM
# Antonio Badilla
# 20.168.761-6
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# No se especifica la condición de las cargas (alternante), por lo cual se supone que existen esfuerzos máximos y haremos un diseño estático para el eje.
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d := 24.111 mm
S_e := K_a*K_b*K_c*K_d*K_e*S_e' = 193.495 MPa
σ_permisible = 266.667 MPa
τ_permisible = 276.96 MPa
# El diámetro respecto a VM es de:
d = 24.111 mm
# Pero al revisar si cumple con los criterios de rigidez, este diámetro es descartado por rigidez torsional, para que se cumpla el valor aproximado debe ser de:
d_y := 24.818 mm
d_θ := 57.821 mm
# Para criterio torsional: | Para criterio rigidez:
d_θ = 57.821 mm
d_y = 24.818 mm
# Respecto al mas critico (torsional), se define un diámetro aproximado de:
#
# Con un n (factor de seguridad) de:
d_1 = 60 mm
n = 11.9311
# Restringido en su dimensionamiento por criterio torsional máximo para ejes de transmisión.
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# Utilizando método de deflexión estática junto con tablas de superposición
y_eje = -2.74936 μm
# Deflexión máxima en el engrane A y al ser materiales dúctiles y lineales la deflexión máxima es la suma de cada una de sus componentes.
y_C1_A = -12.0685 μm
y_C1_B = -3.01714 μm
# Deflexión Máxima en A
# Velocidad critica
w_critico = 7768.52 rpm
y_A = -14.8179 μm
# Considerando una desviación media de un 20%, respecto al factor de seguridad obtenemos que:
w_min ≤ w_critico ≤ w_max == 6215*rpm ≤ 7768.521*rpm ≤ 9322*rpm
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# Para determinar las dimensiones de las chavetas bastó con revisar las tablas que se entregan del Shigley donde:
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L_chaveta_aplastamiento := F_max/(H/2*σ_permisible) = 3.36207 mm
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L_chaveta_aplastamiento = 3.36207 mm
L_chaveta_corte = 0.989119 mm
L_chaveta_aplastamiento := 3.5 mm
# Si consideramos una "dimensión estándar"
L_chaveta_aplastamiento = 3.5 mm
σ_c = 256.158 MPa
S_y/σ_c = 1.87385
S_y = 480 MPa
